// SBML level 3 version 1

model Cytokinesis()

  // Compartments:
  compartment default; default is "Cytokinesis";

  // Species:
  species Edge in default = 0;  // substance in mole
  species Edge_Bent in default = 0;  // substance in mole
  species Edge_Bent_Bent in default = 0;  // substance in mole
  species Edge_Bent_Straight_Straight in default = 0;  // substance in mole
  species Edge_Straight in default = 0;  // substance in mole
  species Edge_Straight_Bent in default = 0;  // substance in mole
  species Edge_Straight_Straight in default = 0;  // substance in mole
  species Ftsz_GDP in default = 0;  // substance in mole
  species Straight in default = 0;  // substance in mole

  // Parameters:
  D_prev = 0;
  L = 0;
  Pi = 3.14;
  diameter = 0;
  diamtere = 0;
  doBending = 0;
  doBinding = 0;
  doUnbinding = 0;
  k_bind = 0;
  k_hyd = 0;
  k_unbind = 0;
  minDameter = 0;
  numEdges = 0;
  unknown = 0;

  // Reactions:
  reaction: Edge + Straight => Edge_Straight; k_bind*doBinding; reaction is "Edge + Straight -> Edge_Straight";
  Edge_Straight_Edge_Bent: Edge_Straight => Edge_Bent; k_hyd*doBending; Edge_Straight_Edge_Bent is "Edge_Straight -> Edge_Bent";
  Edge_Bent_Bent_Ftsz_GDP: Edge_Bent_Bent => Ftsz_GDP; 0; Edge_Bent_Bent_Ftsz_GDP is "Edge_Bent_Bent -> Ftsz_GDP";
  reaction_3: Edge_Straight + Straight => Edge_Straight_Straight; 0; reaction_3 is "Edge_Straight + Straight -> Edge_Straight_Straight";
  reaction_4: Edge_Straight_Straight => Edge_Straight_Bent; 0; reaction_4 is "Edge_Straight_Straight -> Edge_Straight_Bent";
  reaction_5: Edge_Straight_Bent => Edge_Bent_Bent; 0; reaction_5 is "Edge_Straight_Bent -> Edge_Bent_Bent";
  reaction_6: Edge_Bent + Straight => Edge_Straight_Bent; 0; reaction_6 is "Straight + Edge_Bent -> Edge_Straight_Bent";
  reaction_7: Edge_Straight_Bent + Straight => Edge_Bent_Straight_Straight; 0; reaction_7 is "Edge_Straight_Bent + Straight -> Edge_Bent_Straight_Straight";
  reaction_8: Edge_Bent_Straight_Straight => Ftsz_GDP; 0; reaction_8 is "Edge_Bent_Straight_Straight -> Ftsz_GDP";

  // Events:
  bending: at (Edge_Bent_Bent >= numEdges): doBending = 1, doBinding = 0;
  binding: at ((doUnbinding == 1) && (Edge_Bent <= 0)), t0=false: doBinding = 1, doUnbinding = 0, numEdges = Pi/asin(L/D_prev);
  pinchingFinished: at (diameter < minDameter): doBinding = 0, doUnbinding = 0, doBending = 0;
  unbinding: at ((Edge_Straight <= 0) && (Edge_Bent >= 2*numEdges)): doUnbinding = 1, doBending = 0, diameter = numEdges*L/Pi;
end
