// SBML level 3 version 1

model FtsZ_Polymerization()

  // Compartments:
  compartment Cytosol = 1 litre;

  // Species:
  species Cytosol_F in Cytosol = 20/Cytosol; Cytosol_F is "FtsZ";  // substance in mole
  species Cytosol_F_D in Cytosol = 0; Cytosol_F_D is "FtsZ";  // substance in mole
  species Cytosol_F_T in Cytosol = 0; Cytosol_F_T is "FtsZ";  // substance in mole
  species Cytosol_F_T2 in Cytosol = 0; Cytosol_F_T2 is "FtsZ";  // substance in mole
  species Cytosol_F_T3 in Cytosol = 0; Cytosol_F_T3 is "FtsZ";  // substance in mole
  species Cytosol_F_T4 in Cytosol = 0; Cytosol_F_T4 is "FtsZ";  // substance in mole
  species Cytosol_F_T5 in Cytosol = 0; Cytosol_F_T5 is "FtsZ";  // substance in mole
  species Cytosol_F_T6 in Cytosol = 0; Cytosol_F_T6 is "FtsZ";  // substance in mole
  species Cytosol_F_T7 in Cytosol = 0; Cytosol_F_T7 is "FtsZ";  // substance in mole
  species Cytosol_F_T8 in Cytosol = 0; Cytosol_F_T8 is "FtsZ";  // substance in mole
  species Cytosol_F_T9 in Cytosol = 0; Cytosol_F_T9 is "FtsZ";  // substance in mole
  species Cytosol_GDP in Cytosol = 10/Cytosol;  // substance in mole
  species Cytosol_GTP in Cytosol = 90/Cytosol;  // substance in mole

  // Parameters:
  k_act1 = 1.1;
  k_act2 = 0.01 s^-1;
  k_el1 = 5100000;
  k_el2 = 2.9;
  k_ex1 = 10000;
  k_ex2 = 5000;
  k_nuc1 = 4200000;
  k_nuc2 = 40;

  // Reactions:
  F_F_T: Cytosol_F => Cytosol_F_T; k_act1*Cytosol_F; F_F_T is "F -> F_T";
  F_T_F: Cytosol_F_T => Cytosol_F; k_act2*Cytosol_F_T; F_T_F is "F_T -> F";
  F_D_GTP_F_T_GDP: Cytosol_F_D + Cytosol_GTP => Cytosol_F_T + Cytosol_GDP; k_ex1*Cytosol_F_D*Cytosol_GTP; F_D_GTP_F_T_GDP is "F_D + GTP -> F_T + GDP";
  F_T_GDP_F_D_GTP: Cytosol_F_T + Cytosol_GDP => Cytosol_F_D + Cytosol_GTP; k_ex2*Cytosol_F_T*Cytosol_GDP; F_T_GDP_F_D_GTP is "F_T + GDP -> F_D + GTP";
  F_T_F_T2: 2 Cytosol_F_T => Cytosol_F_T2; k_nuc1*Cytosol_F_T*Cytosol_F_T; F_T_F_T2 is "F_T -> F_T2";
  F_T2_F_T: Cytosol_F_T2 => 2 Cytosol_F_T; k_nuc2*Cytosol_F_T2; F_T2_F_T is "F_T2 -> F_T";
  F_T_F_T2_F_T3: Cytosol_F_T + Cytosol_F_T2 => Cytosol_F_T3; k_el1*Cytosol_F_T*Cytosol_F_T2; F_T_F_T2_F_T3 is "F_T + F_T2 -> F_T3";
  F_T_F_T3_F_T4: Cytosol_F_T + Cytosol_F_T3 => Cytosol_F_T4; k_el1*Cytosol_F_T*Cytosol_F_T3; F_T_F_T3_F_T4 is "F_T + F_T3 -> F_T4";
  F_T_F_T4_F_T5: Cytosol_F_T + Cytosol_F_T4 => Cytosol_F_T5; k_el1*Cytosol_F_T*Cytosol_F_T4; F_T_F_T4_F_T5 is "F_T + F_T4 -> F_T5";
  F_T_F_T5_F_T6: Cytosol_F_T + Cytosol_F_T5 => Cytosol_F_T6; k_el1*Cytosol_F_T*Cytosol_F_T5; F_T_F_T5_F_T6 is "F_T + F_T5 -> F_T6";
  F_T_F_T6_F_T7: Cytosol_F_T + Cytosol_F_T6 => Cytosol_F_T7; k_el1*Cytosol_F_T*Cytosol_F_T6; F_T_F_T6_F_T7 is "F_T + F_T6 -> F_T7";
  F_T_F_T7_F_T8: Cytosol_F_T + Cytosol_F_T7 => Cytosol_F_T8; k_el1*Cytosol_F_T*Cytosol_F_T7; F_T_F_T7_F_T8 is "F_T + F_T7 -> F_T8";
  F_T_F_T8_F_T9: Cytosol_F_T + Cytosol_F_T8 => Cytosol_F_T9; k_el1*Cytosol_F_T*Cytosol_F_T8; F_T_F_T8_F_T9 is "F_T + F_T8 -> F_T9";
  F_T9_F_T_F_T8: Cytosol_F_T9 => Cytosol_F_T + Cytosol_F_T8; k_el2*Cytosol_F_T9; F_T9_F_T_F_T8 is "F_T9 -> F_T + F_T8";
  F_T8_F_T_F_T7: Cytosol_F_T8 => Cytosol_F_T + Cytosol_F_T7; k_el2*Cytosol_F_T8; F_T8_F_T_F_T7 is "F_T8 -> F_T + F_T7";
  F_T7_F_T_F_T6: Cytosol_F_T7 => Cytosol_F_T + Cytosol_F_T6; k_el2*Cytosol_F_T7; F_T7_F_T_F_T6 is "F_T7 -> F_T + F_T6";
  F_T6_F_T_F_T5: Cytosol_F_T6 => Cytosol_F_T + Cytosol_F_T5; k_el2*Cytosol_F_T6; F_T6_F_T_F_T5 is "F_T6 -> F_T + F_T5";
  F_T5_F_T_F_T4: Cytosol_F_T5 => Cytosol_F_T + Cytosol_F_T4; k_el2*Cytosol_F_T5; F_T5_F_T_F_T4 is "F_T5 -> F_T + F_T4";
  F_T4_F_T_F_T3: Cytosol_F_T4 => Cytosol_F_T + Cytosol_F_T3; k_el2*Cytosol_F_T4; F_T4_F_T_F_T3 is "F_T4 -> F_T + F_T3";
  F_T3_F_T_F_T2: Cytosol_F_T3 => Cytosol_F_T + Cytosol_F_T2; k_el2*Cytosol_F_T3; F_T3_F_T_F_T2 is "F_T3 -> F_T + F_T2";
end
