// SBML level 3 version 1

model FtsZ_Polymerization()
  // isInstanceOf mamo:MAMO_0000046
  // isDerivedFrom doi:10.1016/j.cell.2012.05.044
  // hasTaxon taxonomy:243273

  // Compartments:
  compartment Cytosol = 1e-18 litre;

  // Species:
  substanceOnly species MG_224_MONOMER in Cytosol = 0.02*Cytosol;  // substance in item; uniprot:P47466
  substanceOnly species MG_224_MONOMER_GDP in Cytosol = 0;  // substance in item; hasPart uniprot:P47466; hasPart CHEBI:17552
  substanceOnly species MG_224_MONOMER_GTP in Cytosol = 0;  // substance in item; hasPart uniprot:P47466; hasPart CHEBI:15996
  substanceOnly species MG_224_2MER_GTP in Cytosol = 0;  // substance in item; hasPart uniprot:P47466; hasPart CHEBI:15996
  substanceOnly species MG_224_3MER_GTP in Cytosol = 0;  // substance in item; hasPart uniprot:P47466; hasPart CHEBI:15996
  substanceOnly species MG_224_4MER_GTP in Cytosol = 0;  // substance in item; hasPart uniprot:P47466; hasPart CHEBI:15996
  substanceOnly species MG_224_5MER_GTP in Cytosol = 0;  // substance in item; hasPart uniprot:P47466; hasPart CHEBI:15996
  substanceOnly species MG_224_6MER_GTP in Cytosol = 0;  // substance in item; hasPart uniprot:P47466; hasPart CHEBI:15996
  substanceOnly species MG_224_7MER_GTP in Cytosol = 0;  // substance in item; hasPart uniprot:P47466; hasPart CHEBI:15996
  substanceOnly species MG_224_8MER_GTP in Cytosol = 0;  // substance in item; hasPart uniprot:P47466; hasPart CHEBI:15996
  substanceOnly species MG_224_9MER_GTP in Cytosol = 0;  // substance in item; hasPart uniprot:P47466; hasPart CHEBI:15996
  substanceOnly species GDP in Cytosol = 0.01*Cytosol;  // substance in item; hasPart CHEBI:17552
  substanceOnly species GTP in Cytosol = 0.09*Cytosol;  // substance in item; hasPart CHEBI:15996
  substanceOnly species GTP__c in Cytosol;  // substance in item; hasPart CHEBI:15996

  // Parameters:
  activationFwd = 1.1 s_1;
  activationRev = 0.01 s_1;
  elongationFwd = 5100000 mls;
  elongationRev = 2.9 s_1;
  exchangeFwd = 10000 mls;
  exchangeRev = 5000 mls;
  nucleationFwd = 4200000 mls;
  nucleationRev = 40 s_1;

  // Assignment rules:
  GTP__c := MG_224_MONOMER + MG_224_MONOMER_GDP;

  // Reactions:
  R03: MG_224_MONOMER_GDP + GTP => MG_224_MONOMER_GTP + GDP; exchangeFwd*MG_224_MONOMER_GDP*GTP; R03 is "MG_224_MONOMER_GDP + GTP -> MG_224_MONOMER_GTP + GDP";
  R04: MG_224_MONOMER_GTP + GDP => MG_224_MONOMER_GDP + GTP; exchangeRev*MG_224_MONOMER_GTP*GDP; R04 is "MG_224_MONOMER_GTP + GDP -> MG_224_MONOMER_GDP + GTP";
  R05: 2 MG_224_MONOMER_GTP => MG_224_2MER_GTP; nucleationFwd*MG_224_MONOMER_GTP*MG_224_MONOMER_GTP; R05 is "MG_224_MONOMER_GTP -> MG_224_2MER_GTP";
  R06: MG_224_2MER_GTP => 2 MG_224_MONOMER_GTP; nucleationRev*MG_224_2MER_GTP; R06 is "MG_224_2MER_GTP -> MG_224_MONOMER_GTP";
  R07: MG_224_MONOMER_GTP + MG_224_2MER_GTP => MG_224_3MER_GTP; elongationFwd*MG_224_MONOMER_GTP*MG_224_2MER_GTP; R07 is "MG_224_MONOMER_GTP + MG_224_2MER_GTP -> MG_224_3MER_GTP";
  R08: MG_224_MONOMER_GTP + MG_224_3MER_GTP => MG_224_4MER_GTP; elongationFwd*MG_224_MONOMER_GTP*MG_224_3MER_GTP; R08 is "MG_224_MONOMER_GTP + MG_224_3MER_GTP -> MG_224_4MER_GTP";
  R09: MG_224_MONOMER_GTP + MG_224_4MER_GTP => MG_224_5MER_GTP; elongationFwd*MG_224_MONOMER_GTP*MG_224_4MER_GTP; R09 is "MG_224_MONOMER_GTP + MG_224_4MER_GTP -> MG_224_5MER_GTP";
  R10: MG_224_MONOMER_GTP + MG_224_5MER_GTP => MG_224_6MER_GTP; elongationFwd*MG_224_MONOMER_GTP*MG_224_5MER_GTP; R10 is "MG_224_MONOMER_GTP + MG_224_5MER_GTP -> MG_224_6MER_GTP";
  R11: MG_224_MONOMER_GTP + MG_224_6MER_GTP => MG_224_7MER_GTP; elongationFwd*MG_224_MONOMER_GTP*MG_224_6MER_GTP; R11 is "MG_224_MONOMER_GTP + MG_224_6MER_GTP -> MG_224_7MER_GTP";
  R12: MG_224_MONOMER_GTP + MG_224_7MER_GTP => MG_224_8MER_GTP; elongationFwd*MG_224_MONOMER_GTP*MG_224_7MER_GTP; R12 is "MG_224_MONOMER_GTP + MG_224_7MER_GTP -> MG_224_8MER_GTP";
  R13: MG_224_MONOMER_GTP + MG_224_8MER_GTP => MG_224_9MER_GTP; elongationFwd*MG_224_MONOMER_GTP*MG_224_8MER_GTP; R13 is "MG_224_MONOMER_GTP + MG_224_8MER_GTP -> MG_224_9MER_GTP";
  R14: MG_224_9MER_GTP => MG_224_MONOMER_GTP + MG_224_8MER_GTP; elongationRev*MG_224_9MER_GTP; R14 is "MG_224_9MER_GTP -> MG_224_MONOMER_GTP + MG_224_8MER_GTP";
  R15: MG_224_8MER_GTP => MG_224_MONOMER_GTP + MG_224_7MER_GTP; elongationRev*MG_224_8MER_GTP; R15 is "MG_224_8MER_GTP -> MG_224_MONOMER_GTP + MG_224_7MER_GTP";
  R16: MG_224_7MER_GTP => MG_224_MONOMER_GTP + MG_224_6MER_GTP; elongationRev*MG_224_7MER_GTP; R16 is "MG_224_7MER_GTP -> MG_224_MONOMER_GTP + MG_224_6MER_GTP";
  R17: MG_224_6MER_GTP => MG_224_MONOMER_GTP + MG_224_5MER_GTP; elongationRev*MG_224_6MER_GTP; R17 is "MG_224_6MER_GTP -> MG_224_MONOMER_GTP + MG_224_5MER_GTP";
  R18: MG_224_5MER_GTP => MG_224_MONOMER_GTP + MG_224_4MER_GTP; elongationRev*MG_224_5MER_GTP; R18 is "MG_224_5MER_GTP -> MG_224_MONOMER_GTP + MG_224_4MER_GTP";
  R19: MG_224_4MER_GTP => MG_224_MONOMER_GTP + MG_224_3MER_GTP; elongationRev*MG_224_4MER_GTP; R19 is "MG_224_4MER_GTP -> MG_224_MONOMER_GTP + MG_224_3MER_GTP";
  R20: MG_224_3MER_GTP => MG_224_MONOMER_GTP + MG_224_2MER_GTP; elongationRev*MG_224_3MER_GTP; R20 is "MG_224_3MER_GTP -> MG_224_MONOMER_GTP + MG_224_2MER_GTP";
  MG_224_MONOMER_GTP_F: MG_224_MONOMER_GTP => MG_224_MONOMER; activationRev*MG_224_MONOMER_GTP; MG_224_MONOMER_GTP_F is "MG_224_MONOMER_GTP -> F";
  F_MG_224_MONOMER_GTP: MG_224_MONOMER => MG_224_MONOMER_GTP; activationFwd*F; F_MG_224_MONOMER_GTP is "F -> MG_224_MONOMER_GTP";

  // Unit definitions:
  unit length = metre;
  unit area = metre^2;
  unit volume = litre;
  unit time = second;
  unit substance = mole;
  unit mls = mole / (litre * second); mls is "molar per second";
  unit s_1 = 1 / second; s_1 is "per second";
end
