// SBML level 3 version 1

model FtsZPolymerization_3_0()
  // FtsZ_Polymerization

  // Compartments:
  compartment Cytosol = 1e-18 litre;

  // Species:
  substanceOnly species GDP in Cytosol = 100000;  // substance in item
  substanceOnly species GTP in Cytosol = 10000;  // substance in item
  substanceOnly species GTP__c in Cytosol;  // substance in item
  substanceOnly species MG_224_2MER_GTP in Cytosol = 0;  // substance in item
  substanceOnly species MG_224_3MER_GTP in Cytosol = 0;  // substance in item
  substanceOnly species MG_224_4MER_GTP in Cytosol = 0;  // substance in item
  substanceOnly species MG_224_5MER_GTP in Cytosol = 0;  // substance in item
  substanceOnly species MG_224_6MER_GTP in Cytosol = 0;  // substance in item
  substanceOnly species MG_224_7MER_GTP in Cytosol = 0;  // substance in item
  substanceOnly species MG_224_8MER_GTP in Cytosol = 0;  // substance in item
  substanceOnly species MG_224_9MER_GTP in Cytosol = 0;  // substance in item
  substanceOnly species MG_224_MONOMER in Cytosol = 1000;  // substance in item
  substanceOnly species MG_224_MONOMER_GDP in Cytosol = 0;  // substance in item
  substanceOnly species MG_224_MONOMER_GTP in Cytosol = 0;  // substance in item

  // Parameters:
  activationFwd = 1.1 s_1;
  activationRev = 0.01 s_1;
  elongationFwd = 5100000 mls;
  elongationRev = 2.9 s_1;
  exchangeFwd = 10000 mls;
  exchangeRev = 5000 mls;
  nucleationFwd = 4200000 mls;
  nucleationRev = 40 s_1;

  // Assignment rules:
  GTP__c := MG_224_MONOMER + MG_224_MONOMER_GDP;

  // Reactions:
  R01: MG_224_MONOMER_GTP => MG_224_MONOMER; activationRev*MG_224_MONOMER_GTP;
  R02: MG_224_MONOMER => MG_224_MONOMER_GTP; activationFwd*MG_224_MONOMER;
  R03: GTP + MG_224_MONOMER_GDP => GDP + MG_224_MONOMER_GTP; exchangeFwd*MG_224_MONOMER_GDP*GTP;
  R04: GDP + MG_224_MONOMER_GTP => GTP + MG_224_MONOMER_GDP; exchangeRev*MG_224_MONOMER_GTP*GDP;
  R05: 2 MG_224_MONOMER_GTP => MG_224_2MER_GTP; nucleationFwd*MG_224_MONOMER_GTP*MG_224_MONOMER_GTP;
  R06: MG_224_2MER_GTP => 2 MG_224_MONOMER_GTP; nucleationRev*MG_224_2MER_GTP;
  R07: MG_224_2MER_GTP + MG_224_MONOMER_GTP => MG_224_3MER_GTP; elongationFwd*MG_224_MONOMER_GTP*MG_224_2MER_GTP;
  R08: MG_224_3MER_GTP + MG_224_MONOMER_GTP => MG_224_4MER_GTP; elongationFwd*MG_224_MONOMER_GTP*MG_224_3MER_GTP;
  R09: MG_224_4MER_GTP + MG_224_MONOMER_GTP => MG_224_5MER_GTP; elongationFwd*MG_224_MONOMER_GTP*MG_224_4MER_GTP;
  R10: MG_224_5MER_GTP + MG_224_MONOMER_GTP => MG_224_6MER_GTP; elongationFwd*MG_224_MONOMER_GTP*MG_224_5MER_GTP;
  R11: MG_224_6MER_GTP + MG_224_MONOMER_GTP => MG_224_7MER_GTP; elongationFwd*MG_224_MONOMER_GTP*MG_224_6MER_GTP;
  R12: MG_224_7MER_GTP + MG_224_MONOMER_GTP => MG_224_8MER_GTP; elongationFwd*MG_224_MONOMER_GTP*MG_224_7MER_GTP;
  R13: MG_224_8MER_GTP + MG_224_MONOMER_GTP => MG_224_9MER_GTP; elongationFwd*MG_224_MONOMER_GTP*MG_224_8MER_GTP;
  R14: MG_224_9MER_GTP => MG_224_8MER_GTP + MG_224_MONOMER_GTP; elongationRev*MG_224_9MER_GTP;
  R15: MG_224_8MER_GTP => MG_224_7MER_GTP + MG_224_MONOMER_GTP; elongationRev*MG_224_8MER_GTP;
  R16: MG_224_7MER_GTP => MG_224_6MER_GTP + MG_224_MONOMER_GTP; elongationRev*MG_224_7MER_GTP;
  R17: MG_224_6MER_GTP => MG_224_5MER_GTP + MG_224_MONOMER_GTP; elongationRev*MG_224_6MER_GTP;
  R18: MG_224_5MER_GTP => MG_224_4MER_GTP + MG_224_MONOMER_GTP; elongationRev*MG_224_5MER_GTP;
  R19: MG_224_4MER_GTP => MG_224_3MER_GTP + MG_224_MONOMER_GTP; elongationRev*MG_224_4MER_GTP;
  R20: MG_224_3MER_GTP => MG_224_2MER_GTP + MG_224_MONOMER_GTP; elongationRev*MG_224_3MER_GTP;

  // Unit definitions:
  unit area = metre^2;
  unit volume = litre;
  unit s_1 = 1 / second; s_1 is "per second";
  unit mls = mole / (litre * second); mls is "molar per second";
  unit substance = mole;
  unit length = metre;
  unit time = second;
end
