// SBML level 3 version 1

model FtsZ_Polymerization()

  // Compartments:
  compartment Cytosol = 1e-18;

  // Species:
  species Cytosol_F in Cytosol = 1000/Cytosol; Cytosol_F is "FtsZ";
  species F_D in Cytosol = 0; F_D is "FtsZ";
  species F_T in Cytosol = 0; F_T is "FtsZ";
  species F_T2 in Cytosol = 0; F_T2 is "FtsZ";
  species F_T3 in Cytosol = 0; F_T3 is "FtsZ";
  species F_T4 in Cytosol = 0; F_T4 is "FtsZ";
  species F_T5 in Cytosol = 0; F_T5 is "FtsZ";
  species F_T6 in Cytosol = 0; F_T6 is "FtsZ";
  species F_T7 in Cytosol = 0; F_T7 is "FtsZ";
  species F_T8 in Cytosol = 0; F_T8 is "FtsZ";
  species F_T9 in Cytosol = 0; F_T9 is "FtsZ";
  species GDP in Cytosol = 10000/Cytosol;
  species GTP in Cytosol = 10000/Cytosol;

  // Parameters:
  avogadro = 6.022141e23;
  factor = Cytosol*avogadro;
  k_act1 = 1.1;
  k_act2 = 0.01;
  k_el1 = 5100000/factor;
  k_el2 = 2.9;
  k_ex1 = 10000/factor;
  k_ex2 = 5000/factor;
  k_nuc = 0;
  k_nuc1 = 4200000/factor;
  k_nuc2 = 40;
  unknown = 0;

  // Reactions:
  F_F_T: Cytosol_F => F_T; k_act1*Cytosol_F; F_F_T is "F -> F_T";
  F_T_F: F_T => Cytosol_F; k_act2*F_T; F_T_F is "F_T -> F";
  F_D_GTP_F_T_GDP: F_D + GTP => F_T + GDP; k_ex1*F_D*GTP; F_D_GTP_F_T_GDP is "F_D + GTP -> F_T + GDP";
  F_T_GDP_F_D_GTP: F_T + GDP => F_D + GTP; k_ex2*F_T*GDP; F_T_GDP_F_D_GTP is "F_T + GDP -> F_D + GTP";
  F_T_F_T2: 2 F_T => F_T2; k_nuc1*F_T*F_T; F_T_F_T2 is "F_T -> F_T2";
  F_T2_F_T: F_T2 => 2 F_T; k_nuc2*F_T2; F_T2_F_T is "F_T2 -> F_T";
  F_T_F_T2_F_T3: F_T + F_T2 => F_T3; k_el1*F_T*F_T2; F_T_F_T2_F_T3 is "F_T + F_T2 -> F_T3";
  F_T_F_T3_F_T4: F_T + F_T3 => F_T4; k_el1*F_T*F_T3; F_T_F_T3_F_T4 is "F_T + F_T3 -> F_T4";
  F_T_F_T4_F_T5: F_T + F_T4 => F_T5; k_el1*F_T*F_T4; F_T_F_T4_F_T5 is "F_T + F_T4 -> F_T5";
  F_T_F_T5_F_T6: F_T + F_T5 => F_T6; k_el1*F_T*F_T5; F_T_F_T5_F_T6 is "F_T + F_T5 -> F_T6";
  F_T_F_T6_F_T7: F_T + F_T6 => F_T7; k_el1*F_T*F_T6; F_T_F_T6_F_T7 is "F_T + F_T6 -> F_T7";
  F_T_F_T7_F_T8: F_T + F_T7 => F_T8; k_el1*F_T*F_T7; F_T_F_T7_F_T8 is "F_T + F_T7 -> F_T8";
  F_T_F_T8_F_T9: F_T + F_T8 => F_T9; k_el1*F_T*F_T8; F_T_F_T8_F_T9 is "F_T + F_T8 -> F_T9";
  F_T9_F_T_F_T8: F_T9 => F_T + F_T8; k_el2*F_T9; F_T9_F_T_F_T8 is "F_T9 -> F_T + F_T8";
  F_T8_F_T_F_T7: F_T8 => F_T + F_T7; k_el2*F_T8; F_T8_F_T_F_T7 is "F_T8 -> F_T + F_T7";
  F_T7_F_T_F_T6: F_T7 => F_T + F_T6; k_el2*F_T7; F_T7_F_T_F_T6 is "F_T7 -> F_T + F_T6";
  F_T6_F_T_F_T5: F_T6 => F_T + F_T5; k_el2*F_T6; F_T6_F_T_F_T5 is "F_T6 -> F_T + F_T5";
  F_T5_F_T_F_T4: F_T5 => F_T + F_T4; k_el2*F_T5; F_T5_F_T_F_T4 is "F_T5 -> F_T + F_T4";
  F_T4_F_T_F_T3: F_T4 => F_T + F_T3; k_el2*F_T4; F_T4_F_T_F_T3 is "F_T4 -> F_T + F_T3";
  F_T3_F_T_F_T2: F_T3 => F_T + F_T2; k_el2*F_T3; F_T3_F_T_F_T2 is "F_T3 -> F_T + F_T2";

  // Unit definitions:
  unit s_1 = -1 second; s_1 is "per second";
  unit mls = mole * -1 litre * -1 second; mls is "molar per second";
end
