// SBML level 3 version 1

model FtsZPolymerization()
  // FtsZ_Polymerization

  // Compartments:
  compartment Cytosol = 1e-18 litre;

  // Species:
  substanceOnly species GDP in Cytosol = 100000;  // substance in item
  substanceOnly species GTP in Cytosol = 10000;  // substance in item
  substanceOnly species MG_224_2MER_GTP in Cytosol = 0;  // substance in item
  substanceOnly species MG_224_3MER_GTP in Cytosol = 0;  // substance in item
  substanceOnly species MG_224_4MER_GTP in Cytosol = 0;  // substance in item
  substanceOnly species MG_224_5MER_GTP in Cytosol = 0;  // substance in item
  substanceOnly species MG_224_6MER_GTP in Cytosol = 0;  // substance in item
  substanceOnly species MG_224_7MER_GTP in Cytosol = 0;  // substance in item
  substanceOnly species MG_224_8MER_GTP in Cytosol = 0;  // substance in item
  substanceOnly species MG_224_9MER_GTP in Cytosol = 0;  // substance in item
  substanceOnly species MG_224_MONOMER in Cytosol = 1000;  // substance in item
  substanceOnly species MG_224_MONOMER_GDP in Cytosol = 0;  // substance in item
  substanceOnly species MG_224_MONOMER_GTP in Cytosol = 0;  // substance in item

  // Parameters:
  activationFwd = 1.1 s_1;
  activationRev = 0.01 s_1;
  avogadro = 6.02214129e23;
  elongationFwd = 5100000/factor; elongationFwd has mls;
  elongationRev = 2.9 s_1;
  exchangeFwd = 10000/factor; exchangeFwd has mls;
  exchangeRev = 5000/factor; exchangeRev has mls;
  factor = Cytosol*avogadro;
  nucleationFwd = 4200000/factor; nucleationFwd has mls;
  nucleationRev = 40 s_1;

  // Reactions:
  FtsZ_activation: GTP + MG_224_MONOMER => MG_224_MONOMER_GTP; activationFwd*MG_224_MONOMER; FtsZ_activation is "MG_224_MONOMER -> MG_224_MONOMER_GTP";
  FtsZ_deactivation: MG_224_MONOMER_GTP => GTP + MG_224_MONOMER; activationRev*MG_224_MONOMER_GTP; FtsZ_deactivation is "MG_224_MONOMER_GTP -> MG_224_MONOMER";
  FtsZ_nucleation: 2 MG_224_MONOMER_GTP => MG_224_2MER_GTP; nucleationFwd*MG_224_MONOMER_GTP*MG_224_MONOMER_GTP; FtsZ_nucleation is "MG_224_MONOMER_GTP -> MG_224_2MER_GTP";
  FtsZ_polymerization__3mer_: MG_224_2MER_GTP + MG_224_MONOMER_GTP => MG_224_3MER_GTP; elongationFwd*MG_224_MONOMER_GTP*MG_224_2MER_GTP; FtsZ_polymerization__3mer_ is "MG_224_MONOMER_GTP + MG_224_2MER_GTP -> MG_224_3MER_GTP";
  FtsZ_polymerization__4mer_: MG_224_3MER_GTP + MG_224_MONOMER_GTP => MG_224_4MER_GTP; elongationFwd*MG_224_MONOMER_GTP*MG_224_3MER_GTP; FtsZ_polymerization__4mer_ is "MG_224_MONOMER_GTP + MG_224_3MER_GTP -> MG_224_4MER_GTP";
  FtsZ_polymerization__5mer_: MG_224_4MER_GTP + MG_224_MONOMER_GTP => MG_224_5MER_GTP; elongationFwd*MG_224_MONOMER_GTP*MG_224_4MER_GTP; FtsZ_polymerization__5mer_ is "MG_224_MONOMER_GTP + MG_224_4MER_GTP -> MG_224_5MER_GTP";
  FtsZ_polymerization__6mer_: MG_224_5MER_GTP + MG_224_MONOMER_GTP => MG_224_6MER_GTP; elongationFwd*MG_224_MONOMER_GTP*MG_224_5MER_GTP; FtsZ_polymerization__6mer_ is "MG_224_MONOMER_GTP + MG_224_5MER_GTP -> MG_224_6MER_GTP";
  FtsZ_polymerization__7mer_: MG_224_6MER_GTP + MG_224_MONOMER_GTP => MG_224_7MER_GTP; elongationFwd*MG_224_MONOMER_GTP*MG_224_6MER_GTP; FtsZ_polymerization__7mer_ is "MG_224_MONOMER_GTP + MG_224_6MER_GTP -> MG_224_7MER_GTP";
  FtsZ_polymerization__8mer_: MG_224_7MER_GTP + MG_224_MONOMER_GTP => MG_224_8MER_GTP; elongationFwd*MG_224_MONOMER_GTP*MG_224_7MER_GTP; FtsZ_polymerization__8mer_ is "MG_224_MONOMER_GTP + MG_224_7MER_GTP -> MG_224_8MER_GTP";
  FtsZ_polymerization__9mer_: MG_224_8MER_GTP + MG_224_MONOMER_GTP => MG_224_9MER_GTP; elongationFwd*MG_224_MONOMER_GTP*MG_224_8MER_GTP; FtsZ_polymerization__9mer_ is "MG_224_MONOMER_GTP + MG_224_8MER_GTP -> MG_224_9MER_GTP";
  R03: GTP + MG_224_MONOMER_GDP => GDP + MG_224_MONOMER_GTP; exchangeFwd*MG_224_MONOMER_GDP*GTP; R03 is "MG_224_MONOMER_GDP + GTP -> MG_224_MONOMER_GTP + GDP";
  R04: GDP + MG_224_MONOMER_GTP => GTP + MG_224_MONOMER_GDP; exchangeRev*MG_224_MONOMER_GTP*GDP; R04 is "MG_224_MONOMER_GTP + GDP -> MG_224_MONOMER_GDP + GTP";
  R06: MG_224_2MER_GTP => 2 MG_224_MONOMER_GTP; nucleationRev*MG_224_2MER_GTP; R06 is "MG_224_2MER_GTP -> MG_224_MONOMER_GTP";
  R14: MG_224_9MER_GTP => MG_224_8MER_GTP + MG_224_MONOMER_GTP; elongationRev*MG_224_9MER_GTP; R14 is "MG_224_9MER_GTP -> MG_224_MONOMER_GTP + MG_224_8MER_GTP";
  R15: MG_224_8MER_GTP => MG_224_7MER_GTP + MG_224_MONOMER_GTP; elongationRev*MG_224_8MER_GTP; R15 is "MG_224_8MER_GTP -> MG_224_MONOMER_GTP + MG_224_7MER_GTP";
  R16: MG_224_7MER_GTP => MG_224_6MER_GTP + MG_224_MONOMER_GTP; elongationRev*MG_224_7MER_GTP; R16 is "MG_224_7MER_GTP -> MG_224_MONOMER_GTP + MG_224_6MER_GTP";
  R17: MG_224_6MER_GTP => MG_224_5MER_GTP + MG_224_MONOMER_GTP; elongationRev*MG_224_6MER_GTP; R17 is "MG_224_6MER_GTP -> MG_224_MONOMER_GTP + MG_224_5MER_GTP";
  R18: MG_224_5MER_GTP => MG_224_4MER_GTP + MG_224_MONOMER_GTP; elongationRev*MG_224_5MER_GTP; R18 is "MG_224_5MER_GTP -> MG_224_MONOMER_GTP + MG_224_4MER_GTP";
  R19: MG_224_4MER_GTP => MG_224_3MER_GTP + MG_224_MONOMER_GTP; elongationRev*MG_224_4MER_GTP; R19 is "MG_224_4MER_GTP -> MG_224_MONOMER_GTP + MG_224_3MER_GTP";
  R20: MG_224_3MER_GTP => MG_224_2MER_GTP + MG_224_MONOMER_GTP; elongationRev*MG_224_3MER_GTP; R20 is "MG_224_3MER_GTP -> MG_224_MONOMER_GTP + MG_224_2MER_GTP";

  // Unit definitions:
  unit s_1 = 1 / second; s_1 is "per second";
  unit mls = mole / (litre * second); mls is "molar per second";
end
