// SBML level 3 version 1

model FtsZ_Polymerization()

  // Compartments:
  compartment default; default is "FtsZ Polymerization";

  // Species:
  species F in default = 20/default;
  species F_D in default = 0;
  species F_T in default = 0;
  species F_T2 in default = 0;
  species F_T3 in default = 0;
  species F_T4 in default = 0;
  species F_T5 in default = 0;
  species F_T6 in default = 0;
  species F_T7 in default = 0;
  species F_T8 in default = 0;
  species F_T9 in default = 0;
  species GDP in default = 10/default;
  species GTP in default = 90/default;

  // Parameters:
  k_act1 = 1.1;
  k_act2 = 0.01;
  k_el1 = 5100000;
  k_el2 = 2.9;
  k_ex1 = 10000;
  k_ex2 = 5000;
  k_nuc1 = 4200000;
  k_nuc2 = 40;

  // Reactions:
  F_F_T: F => F_T; k_act1*F; F_F_T is "F -> F_T";
  F_T_F: F_T => F; k_act2*F_T; F_T_F is "F_T -> F";
  F_D_GTP_F_T_GDP: F_D + GTP => F_T + GDP; k_ex1*F_D*GTP; F_D_GTP_F_T_GDP is "F_D + GTP -> F_T + GDP";
  F_T_GDP_F_D_GTP: F_T + GDP => F_D + GTP; k_ex2*F_T*GDP; F_T_GDP_F_D_GTP is "F_T + GDP -> F_D + GTP";
  F_T_F_T2: 2 F_T => F_T2; k_nuc1*F_T*F_T; F_T_F_T2 is "F_T -> F_T2";
  F_T2_F_T: F_T2 => 2 F_T; k_nuc2*F_T2; F_T2_F_T is "F_T2 -> F_T";
  F_T_F_T2_F_T3: F_T + F_T2 => F_T3; k_el1*F_T*F_T2; F_T_F_T2_F_T3 is "F_T + F_T2 -> F_T3";
  F_T_F_T3_F_T4: F_T + F_T3 => F_T4; k_el1*F_T*F_T3; F_T_F_T3_F_T4 is "F_T + F_T3 -> F_T4";
  F_T_F_T4_F_T5: F_T + F_T4 => F_T5; k_el1*F_T*F_T4; F_T_F_T4_F_T5 is "F_T + F_T4 -> F_T5";
  F_T_F_T5_F_T6: F_T + F_T5 => F_T6; k_el1*F_T*F_T5; F_T_F_T5_F_T6 is "F_T + F_T5 -> F_T6";
  F_T_F_T6_F_T7: F_T + F_T6 => F_T7; k_el1*F_T*F_T6; F_T_F_T6_F_T7 is "F_T + F_T6 -> F_T7";
  F_T_F_T7_F_T8: F_T + F_T7 => F_T8; k_el1*F_T*F_T7; F_T_F_T7_F_T8 is "F_T + F_T7 -> F_T8";
  F_T_F_T8_F_T9: F_T + F_T8 => F_T9; k_el1*F_T*F_T8; F_T_F_T8_F_T9 is "F_T + F_T8 -> F_T9";
  F_T9_F_T_F_T8: F_T9 => F_T + F_T8; k_el2*F_T9; F_T9_F_T_F_T8 is "F_T9 -> F_T + F_T8";
  F_T8_F_T_F_T7: F_T8 => F_T + F_T7; k_el2*F_T8; F_T8_F_T_F_T7 is "F_T8 -> F_T + F_T7";
  F_T7_F_T_F_T6: F_T7 => F_T + F_T6; k_el2*F_T7; F_T7_F_T_F_T6 is "F_T7 -> F_T + F_T6";
  F_T6_F_T_F_T5: F_T6 => F_T + F_T5; k_el2*F_T6; F_T6_F_T_F_T5 is "F_T6 -> F_T + F_T5";
  F_T5_F_T_F_T4: F_T5 => F_T + F_T4; k_el2*F_T5; F_T5_F_T_F_T4 is "F_T5 -> F_T + F_T4";
  F_T4_F_T_F_T3: F_T4 => F_T + F_T3; k_el2*F_T4; F_T4_F_T_F_T3 is "F_T4 -> F_T + F_T3";
  F_T3_F_T_F_T2: F_T3 => F_T + F_T2; k_el2*F_T3; F_T3_F_T_F_T2 is "F_T3 -> F_T + F_T2";
end
